/TITLE, 2D DISC COMPRESSION STRESS ANALYSIS

!PRE-PROCESSING PHASE
/PREP7					!ACTIVATES PRE-PROCESSING PHASE
!DEFINING ELEMENT
ET,1,82,,,3
R,1,3					!ASSIGNING THICKNESS AS 3 UNITS
!DEFINING MATERIAL PROPERTIES
MP,EX,1,2E5				!YOUNG'S MODULUS
MP,PRXY,1,0.33				!POISSON'S RATIO
!DEFINING THE SOLID
PCIRC,0,5				!PLOTTING THE RECTANGLE WITH INNER RADIUS AS 0 AND OUTER RADIUS AS 5 UNITS
APLOT					!PLOT AREA(S)
!DEFINING MESH
KESIZE,ALL,0.5
AMESH,1
EPLOT
FINI

!SOLUTION PHASE
/SOLU					!ACTIVATES SOLUTION PHASE
!APPLYING SURFACE LOADS
SFL,1,PRES,100
SFL,2,PRES,100
!DEFINING THE SUPPORTS
DL,3,1,UX
DL,3,1,UY
DL,4,1,UX
DL,4,1,UY
SOLVE
